// COMSOL Multiphysics 6.4.0.378 model "full_baseline_reference_simple_gland_static_baseline_result.mph"
// Outline of the model tree

Parameters
  breast_radius = 0.07[m]
  chest_thickness = 0.002[m]
  skin_shell_thickness = 0.0001000000[m]
  chest_curve_depth = 0.0007000000[m]
  chest_curve_radius = 3.5003500000[m]
  chest_curve_center_y = -3.4996500000[m]
  mesh_density_hint = 140.0
  skin_density = 1100.0[kg/m^3]
  adipose_density = 911.0[kg/m^3]
  glandular_density = 911.0[kg/m^3]
  chest_density = 1050.000000000000[kg/m^3]
  g_acc = 9.81[m/s^2]
  skin_bulk_modulus = 480000.000000000000[Pa]
  skin_c10 = 1200.000000000000[Pa]
  skin_c01 = 1200.000000000000[Pa]
  adipose_bulk_modulus = 425000.000000000000[Pa]
  adipose_c10 = 109.000000000000[Pa]
  adipose_c01 = 106.000000000000[Pa]
  glandular_bulk_modulus = 425000.000000000000[Pa]
  glandular_c10 = 230.000000000000[Pa]
  glandular_c01 = 195.000000000000[Pa]
  skin_E = 14352.159468438538[Pa]
  skin_nu = 0.495016611296
  adipose_E = 1289.565087852724[Pa]
  adipose_nu = 0.499000000000
  glandular_E = 2548.301132578281[Pa]
  glandular_nu = 0.499000000000
  chest_E = 10000.000000000000[Pa]
  chest_nu = 0.490000000000

Geometry
  geom1 "Geometry 1" (3D, length unit m)
    sph_outer: Sphere | r = breast_radius; pos = {0, 0, 0}
    nipple_cap: Ellipsoid | semiaxes = 0.00882000 0.00882000 0.00350000; pos = 0 0.07182000 0; axistype = y
    blk_half: Block | size = 2*breast_radius breast_radius 2*breast_radius; pos = -breast_radius 0 -breast_radius
    breast_base: Intersection | input = sph_outer, blk_half
    breast_outer: Union | input = breast_base, nipple_cap
    chest_cyl: Cylinder | r = breast_radius; h = chest_thickness; pos = 0 -chest_thickness 0; axistype = y
    gland_keep_anterior: Block
      size = 2*breast_radius 2*breast_radius 2*breast_radius
      pos = -breast_radius 0 -breast_radius
    gland_seed: Ellipsoid | semiaxes = 0.02415000 0.02310000 0.07350000; pos = 0 0.00000000 0.00000000; axistype = y
    gland_nipple_core: Ellipsoid | semiaxes = 0.00793800 0.00793800 0.00336000; pos = 0 0.07154560 0; axistype = y
    gland_seed_with_nipple: Union | input = gland_seed, gland_nipple_core
    gland_clip: Intersection | input = gland_seed_with_nipple, breast_outer; keep = on
    adipose_diff: Difference | input = breast_outer; input2 = gland_clip; keepsubtract = on
    breast_union: Union | input = adipose_diff, gland_clip, chest_cyl
    fin: Finalize "Form Union"

Materials
  mat_chest: Common "ChestWall" on selection geom1_chest_cyl_dom
    def: def "Basic"
      density = chest_density
      youngsmodulus = chest_E
      poissonsratio = chest_nu
  mat_skin_shell: Common "SkinShellScaffold" on selection geom1_breast_outer_bnd
    def: def "Basic"
      density = skin_density
      youngsmodulus = skin_E
      poissonsratio = skin_nu
  mat_adipose: Common "Adipose" on selection geom1_adipose_diff_dom
    def: def "Basic"
      density = adipose_density
      youngsmodulus = adipose_E
      poissonsratio = adipose_nu
  mat_glandular: Common "Glandular" on selection geom1_gland_clip_dom
    def: def "Basic"
      density = glandular_density
      youngsmodulus = glandular_E
      poissonsratio = glandular_nu

Physics
  solid: SolidMechanics on selection geom1_breast_union_dom
    dependent variable u = {u, v, w}
    lemm1: LinearElasticModel "Linear Elastic Material 1" (default)
    free1: Free (default)
    init1: init "Initial Values 1" (default)
    fix1: Fixed "Fixed Constraint 1" on selection geom1_chest_cyl_bnd
    gacc1: GravityAcceleration "Gravity 1" | g = {0, 0, -g_acc}
  shell1: Shell on selection geom1_breast_outer_bnd
    dependent variable u2 = {u2, v2, w2}
    emm1: Elastic "Linear Elastic Material 1" (default)
      shls1: ShellLocalSystem (default)
    to1: ThicknessOffset "Thickness and Offset 1" (default)
    free1: Free (default)
    init1: init "Initial Values 1" (default)

Multiphysics
  sthin1: SolidShellConnection "Solid–Thin Structure Connection 1"
    Solid_physics = solid
    Shell_physics = shell1
    edgBndSolidSelection: boundaries 1, 2, 8-10, 13-17, 21-24, 31-38, 41-52, 55-59, 61-63, 65-73, 75, 77-88, 95, 96
    edgBndShellSelection: edges 8-10, 18, 19, 23-26, 32-34, 36-38, 43-46, 48-50, 52-54, 66, 68, 70, 72-74, 79-82, 84, 85, 87, 88, 90, 91, 93-100, 102, 103, 105, 107, 108, 110-112, 123-126, 129, 131, 132, 134, 135, 139, 141

Mesh
  mesh1 "Mesh 1" (physics-controlled)

Studies
  std1 "Study 1"
    stat: Stationary

Solver configurations
  sol1 "Solution 1" (study std1)
    v1: Variables "Dependent Variables 1"
    s1: Stationary "Stationary Solver 1"
      dDef: Direct
      fc1: FullyCoupled

Datasets
  dset1: Solution | solution = sol1