// COMSOL Multiphysics 6.4.0.378 model "default_comsol_comsol_postprocess_output_PostModel.mph"
// Outline of the model tree

Parameters
  breast_radius = 0.07[m]
  chest_thickness = 0.002[m]
  mesh_density_hint = 140.0
  skin_density = 1100.0[kg/m^3]
  adipose_density = 911.0[kg/m^3]
  glandular_density = 911.0[kg/m^3]
  g_acc = 9.81[m/s^2]
  skin_E = 14352.159468438538[Pa]
  skin_nu = 0.495016611296
  adipose_E = 1289.565087852724[Pa]
  adipose_nu = 0.499000000000
  glandular_E = 2548.301132578281[Pa]
  glandular_nu = 0.499000000000

Geometry
  geom1 "Geometry 1" (3D, length unit m)
    sph_outer: Sphere | r = breast_radius; pos = {0, 0, 0}
    blk_half: Block | size = 2*breast_radius breast_radius 2*breast_radius; pos = -breast_radius 0 -breast_radius
    breast_base: Intersection | input = sph_outer, blk_half
    nipple_cap: Ellipsoid | semiaxes = 0.00630000 0.00525000 0.00350000; pos = 0 0.07157500 0; axistype = y
    breast_outer: Union | input = breast_base, nipple_cap
    chest_cyl: Cylinder | r = breast_radius; h = chest_thickness; pos = 0 -chest_thickness 0; axistype = y
    gland_keep_anterior: Block
      size = 2*breast_radius 2*breast_radius 2*breast_radius
      pos = -breast_radius 0 -breast_radius
    gland_seed: Ellipsoid | semiaxes = 0.02415000 0.02310000 0.07350000; pos = 0 0.00000000 0.00000000; axistype = y
    gland_clip: Intersection | input = gland_seed, breast_outer, gland_keep_anterior; keep = on
    adipose_diff: Difference | input = breast_outer; input2 = gland_clip; keepsubtract = on
    breast_union: Union | input = adipose_diff, gland_clip, chest_cyl
    fin: Finalize "Form Union"

Materials
  mat_chest: Common "ChestWall" on selection geom1_chest_cyl_dom
    def: def "Basic"
      density = skin_density
      youngsmodulus = skin_E
      poissonsratio = skin_nu
  mat_adipose: Common "Adipose" on selection geom1_adipose_diff_dom
    def: def "Basic"
      density = adipose_density
      youngsmodulus = adipose_E
      poissonsratio = adipose_nu
  mat_glandular: Common "Glandular" on selection geom1_gland_clip_dom
    def: def "Basic"
      density = glandular_density
      youngsmodulus = glandular_E
      poissonsratio = glandular_nu

Physics
  solid: SolidMechanics on selection geom1_breast_union_dom
    dependent variable u = {u, v, w}
    lemm1: LinearElasticModel "Linear Elastic Material 1" (default)
    free1: Free (default)
    init1: init "Initial Values 1" (default)
    fix1: Fixed "Fixed Constraint 1" on selection geom1_chest_cyl_bnd
    gacc1: GravityAcceleration "Gravity 1" | g = {0, 0, -g_acc}

Mesh
  mesh1 "Mesh 1" (physics-controlled)

Studies
  std1 "Study 1"
    stat: Stationary

Solver configurations
  sol1 "Solution 1" (study std1)
    v1: Variables "Dependent Variables 1"
    s1: Stationary "Stationary Solver 1"
      fc1: FullyCoupled
      d1: Direct "Suggested Direct Solver (solid)"

Datasets
  dset1: Solution | solution = sol1

Derived values
  ivBreastVol: IntVolume "Volume Integration" on selection geom1_breast_union_dom | data = dset1; expr = 1
  ivGlandVol: IntVolume "Volume Integration 2" on selection geom1_gland_clip_dom | data = dset1; expr = 1
  ivAdiposeVol: IntVolume "Volume Integration 3" on selection geom1_adipose_diff_dom | data = dset1; expr = 1
  mvDispBreast: MaxVolume "Volume Maximum" on selection geom1_breast_union_dom | data = dset1; expr = solid.disp
  ivDispBreast: IntVolume "Volume Integration 4" on selection geom1_breast_union_dom | data = dset1; expr = solid.disp
  mvMisesBreast: MaxVolume "Volume Maximum 2" on selection geom1_breast_union_dom | data = dset1; expr = solid.mises
  mvMisesGland: MaxVolume "Volume Maximum 3" on selection geom1_gland_clip_dom | data = dset1; expr = solid.mises